# OpenSim document version 40000
ForceSet MonkeyArm:
  CoordinateActuator shoulder_adduction_reserve: coordinate=shoulder_adduction optimal_force=1
  CoordinateActuator shoulder_rotation_reserve: coordinate=shoulder_rotation optimal_force=1
  CoordinateActuator shoulder_flexion_reserve: coordinate=shoulder_flexion optimal_force=1
  CoordinateActuator elbow_flexion_reserve: coordinate=elbow_flexion optimal_force=1
  CoordinateActuator radial_pronation_reserve: coordinate=radial_pronation optimal_force=1
  CoordinateActuator wrist_flexion_reserve: coordinate=wrist_flexion optimal_force=1
  CoordinateActuator wrist_abduction_reserve: coordinate=wrist_abduction optimal_force=1
