# OpenSim document version 40000
ScaleTool MonkeyArm-scaled:
  mass: 7.006001 [kg]
  height: -1
  age: -1
  ModelScaler:
    apply: true
    time_range: -1 -1
    preserve_mass_distribution: false
  MarkerPlacer:
    apply: true
    time_range: -1 -1
    max_marker_movement: -1
    IKTaskSet:
      IKMarkerTask Marker_8: apply=true weight=1
      IKMarkerTask Marker_7: apply=true weight=1
      IKMarkerTask Marker_6: apply=true weight=1
      IKMarkerTask Marker_4: apply=true weight=1
      IKMarkerTask Marker_5: apply=true weight=1
      IKMarkerTask Marker_2: apply=true weight=1
      IKMarkerTask Marker_3: apply=true weight=1
      IKMarkerTask Marker_1: apply=true weight=1
      IKMarkerTask Shoulder_JC: apply=true weight=1
      IKMarkerTask Elbow_JC: apply=true weight=1
      IKMarkerTask Pronation_Pt1: apply=true weight=1
      IKMarkerTask Wrist_JC: apply=true weight=1
      IKMarkerTask Pronation_Pt2: apply=true weight=1
