# OpenSim document version 40000
CMC_TaskSet MonkeyArm:
  CMC_Joint [values shared by the 7 below unless stated]: weight=1 active=(true false false) kp=100 kv=20 ka=1 limit=0
  CMC_Joint shoulder_adduction: coordinate=shoulder_adduction
  CMC_Joint shoulder_rotation: coordinate=shoulder_rotation
  CMC_Joint shoulder_flexion: coordinate=shoulder_flexion
  CMC_Joint elbow_flexion: coordinate=elbow_flexion
  CMC_Joint radial_pronation: coordinate=radial_pronation
  CMC_Joint wrist_flexion: coordinate=wrist_flexion
  CMC_Joint wrist_abduction: coordinate=wrist_abduction
