# OpenSim document version 40000
ForwardTool 1:
  model_file: ../arm26.osim
  replace_force_set: false
  force_set_files: reserve_actuators.xml
  results_directory: C:/Users/Jaxton/controlled-movement/System Identification/FD_Results
  output_precision: 6
  initial_time: 0.03
  final_time: 1
  solve_for_equilibrium_for_auxiliary_states: false
  maximum_number_of_integrator_steps: 20000
  maximum_integrator_step_size: 1
  minimum_integrator_step_size: 1e-8
  integrator_error_tolerance: 1e-5
  states_file: C:/Users/Jaxton/controlled-movement/System Identification/CMC_Results/cmc_1_states.sto
  use_specified_dt: false
  ControllerSet Controllers:
    ControlSetController: controls_file=(C:/Users/Jaxton/controlled-movement/System Identification/CMC_Results/cmc_1_controls.sto)
