# OpenSim document version 40000
ForwardTool arm26:
  model_file: C:\Users\Jaxton\OneDrive\controlled-movement\arm26.osim
  replace_force_set: false
  force_set_files: C:\Users\Jaxton\OneDrive\controlled-movement\Tools\reserve_actuators.xml
  results_directory: SS_Results
  output_precision: 8
  initial_time: 0.02
  final_time: 0.04
  solve_for_equilibrium_for_auxiliary_states: false
  maximum_number_of_integrator_steps: 20000
  maximum_integrator_step_size: 1
  minimum_integrator_step_size: 1e-8
  integrator_error_tolerance: 5e-6
  states_file: C:\Users\Jaxton\OneDrive\controlled-movement\Tools\SS_Results\cumulative_states.sto
  use_specified_dt: false
  ControllerSet Controllers:
    ControlSetController: controls_file=C:\Users\Jaxton\OneDrive\controlled-movement\Tools\SS_Results\single_step_controls.sto
