# OpenSim document version 40000
ForwardTool arm26:
  model_file: C:\Users\Jaxton\OneDrive\controlled-movement\arm26.osim
  force_set_files: reserve_actuators.xml
  replace_force_set: false
  initial_time: 0.03
  final_time: 0.49
  maximum_number_of_integrator_steps: 20000
  maximum_integrator_step_size: 1
  minimum_integrator_step_size: 1e-8
  integrator_error_tolerance: 5e-6
  use_specified_dt: false
  results_directory: FD_Results
  output_precision: 20
  states_file: CMC_Results/cmc_output_states.sto
  AnalysisSet Analyses:
    Kinematics: on=false step_interval=1 in_degrees=true
    Actuation: on=false step_interval=1 in_degrees=true
    BodyKinematics: on=false step_interval=1 in_degrees=true
  ControllerSet Controllers:
    ControlSetController: enable_controller=ALL controls_file=CMC_Results/cmc_output_controls.sto
