# OpenSim document version 40000
ForwardTool arm26:
  model_file: C:\Users\Jaxton\OneDrive\controlled-movement\arm26.osim
  replace_force_set: false
  force_set_files: reserve_actuators.xml
  results_directory: FD_Results
  output_precision: 20
  initial_time: 0.03
  final_time: 0.489
  maximum_number_of_integrator_steps: 30000
  maximum_integrator_step_size: 1
  minimum_integrator_step_size: 1e-8
  integrator_error_tolerance: 5e-6
  states_file: CMC_Results/cmc_output_states.sto
  use_specified_dt: true
  AnalysisSet Analyses:
    Kinematics: on=false step_interval=1 in_degrees=true
    Actuation: on=false step_interval=1 in_degrees=true
    BodyKinematics: on=false step_interval=1 in_degrees=true
  ControllerSet Controllers:
    ControlSetController: controls_file=CMC_Results/cmc_output_controls.sto
