# OpenSim document version 40000
ForwardTool arm26:
  replace_force_set: false
  force_set_files: reserve_actuators.xml
  results_directory: SS_Results
  output_precision: 20
  initial_time: 0.03
  final_time: 0.49
  solve_for_equilibrium_for_auxiliary_states: false
  maximum_number_of_integrator_steps: 20000
  maximum_integrator_step_size: 1
  minimum_integrator_step_size: 1e-8
  integrator_error_tolerance: 1e-5
  use_specified_dt: false
  ControllerSet Controllers:
    ControlSetController: controls_file=CMC_Results/cmc_output_controls.xml
